units real
atom_style charge
boundary f f f
read_data atoms.data
pair_style reaxff NULL tabulate 0 enobonds yes
pair_coeff * * ffield O H
fix charges all qeq/reaxff 1 0 10 1e-12 reaxff maxiter 2000
neighbor 2.0 bin
neigh_modify every 1 delay 0 check yes
compute reax all pair reaxff
compute bondinfo all reaxff/atom
compute dipole all dipole
dump atoms all custom 1 atoms.dump id type q x y z fx fy fz c_bondinfo[1] c_bondinfo[2] c_bondinfo[3]
dump_modify atoms sort id format float %.17g
thermo_style custom step pe c_reax[*] c_dipole[1] c_dipole[2] c_dipole[3]
thermo_modify format float %.17g
set type 1 charge -0.8
set type 2 charge 0.4
run 0
print "$(pe:%.17g) $(c_reax[1]:%.17g) $(c_reax[2]:%.17g) $(c_reax[3]:%.17g) $(c_reax[4]:%.17g) $(c_reax[5]:%.17g) $(c_reax[6]:%.17g) $(c_reax[7]:%.17g) $(c_reax[8]:%.17g) $(c_reax[9]:%.17g) $(c_reax[10]:%.17g) $(c_reax[11]:%.17g) $(c_reax[12]:%.17g) $(c_reax[13]:%.17g) $(c_reax[14]:%.17g)" file energy.txt screen no
print "$(c_dipole[1]:%.17g) $(c_dipole[2]:%.17g) $(c_dipole[3]:%.17g)" file dipole.txt screen no
