units real
atom_style charge
boundary f f f
read_data atoms.data
pair_style reaxff NULL tabulate 0 enobonds yes
pair_coeff * * ffield O Zn
fix charges all qeq/reaxff 1 0 10 1e-12 reaxff maxiter 2000
neighbor 2.0 bin
neigh_modify every 1 delay 0 check yes
compute reax all pair reaxff
thermo_style custom step pe c_reax[*]
thermo_modify format float %.17g
run 0
print "$(pe:%.17g) $(c_reax[1]:%.17g) $(c_reax[2]:%.17g) $(c_reax[3]:%.17g) $(c_reax[4]:%.17g) $(c_reax[5]:%.17g) $(c_reax[6]:%.17g) $(c_reax[7]:%.17g) $(c_reax[8]:%.17g) $(c_reax[9]:%.17g) $(c_reax[10]:%.17g) $(c_reax[11]:%.17g) $(c_reax[12]:%.17g) $(c_reax[13]:%.17g) $(c_reax[14]:%.17g)" file energy.txt screen no
write_dump all custom atoms.dump id type q x y z fx fy fz modify sort id format float %.17g
